# 1. Using PTC Mathcad for Algebra
# A. Make a variable
z4 := 12
τ := 2*π
v_final := 64 m/s
max_accel := 25*g
# B. Algebric Operators
2^16 = 65536
nthroot(e, 3) = 1.39561
13! = 6227020800
# C. Function
y(x) := sin(2*x) - 2*sin(x)
parabolid(x, y) := x^2 + y^2
# D. Roots
g(x) := x^3 + 5*x^2 + 2*x - 8
# [plot: g(x) vs x]
coeff := [-8; 2; 5; 1]  # Polyroots function allow us to find all the roots of a function
# The roots are the values were the function equals to zero
polyroots(coeff) = [-4; -2; 1]
# E. Solving Symbolically
a*x^2 + b*x + c solve, x → [-(b/2 + sqrt(b^2 - 4*a*c)/2)/a; -(b/2 - sqrt(b^2 - 4*a*c)/2)/a]
x^2 + 9*x + 8 factor → (x + 8)*(x + 1)
