# 1. Using PTC Mathcad for Calculus
# A. Limits
f(x) := (x^2 - 1)/(x - 1)
f(1) =  # error: This expression is divided by zero. It cannot be computed.
limit(f(x), x → 1) → 2
g(x) := sin(x)/x
g(0) =  # error
limit(g(x), x → 0) → 1
# B. Summations
sum(4^(-n), n = 0 .. 20) = 1.33333
# C. Derivatives
h(x) := d/dx(x^2) + 4*x + 16 → 6*x + 16
h(10) = 76
# D. Integrals
integral(sqrt(x)*e^(-x), x = 0 .. ∞) → sqrt(π)/2 = 0.886227
integral(cot(x), x) → ln(sin(x))
