# header: © Dr. Pat Heffernan, 202 3
# Doubly Reinforced Rectangular Sections - calculate Mr
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ORIGIN := 1
mms := mm^2
# Set origin and units for combo box
# Geometric | Material
b := 250*mm
f'_c := 25*MPa
f_y := 400 MPa
h := 500*mm
a_max := 25 mm
f'_y := 400 MPa
A_1 := b*h = 0.125 m^2
ϕ_c := 0.65
ϕ_s := 0.85  # A23.1-14  8.4.2 & 8.4.3
A_2 := b*h = 125000 mm^2
# Just change the dimension guys :)
A_3 := b*h = 193.75 in^2
# Compression reinforcement is 2 x 25M bars, Tension reinforcement is
# 4 x 30M bars.  The tension reinforcement is placed in two rows.
# 1. Select bars and compute effective depth | a_max | max aggregate size
# Determine cover
exp := "not exposed"  # list choice: not exposed = "not exposed", exposed = "exposed", special = "special"  # Select degree of exposure
cover :=
    if exp == "not exposed"
        cover ← 30 mm
    else if exp == "exposed"
        cover ← 40 mm
    else
        cover ← 60 mm
    cover ← max(cover, 1.5*a_max)
    = 37.5 mm
# A23.1-14  6.6.6.2.3
# (Table 17)
# Top Steel (select bar and number of bars)
Bar' := [list choice]  # options: 10M, 15M, 20M, 25M, 30M, 35M, 45M, 55M
A'_bar := Bar'[1] = 700 mm^2
d'_s := Bar'[2] = 29.9 mm
# A23.3-14  1.3.3
# (Table 1.5)
n' := 2
A'_s := n'*A'_bar = 1400 mm^2
d' := cover + d'_s/2 = 52.45 mm  # depth to compression steel
# Bottom Steel (select bar, number of bars, and number of rows)
Bar := [list choice]  # options: 10M, 15M, 20M, 25M, 30M, 35M, 45M, 55M
A_bar := Bar[1] = 700 mm^2
d_bar := Bar[2] = 29.9 mm
n_bar := 4
A_s := n_bar*A_bar = 2800 mm^2
n_rows := 2
# Shear Stirrup (select bar)
Stirrup := [list choice]  # options: 10M, 15M, 20M, 25M, 30M, 35M, 45M, 55M
d_v := Stirrup[2] = 11.3 mm
# Establish spacing between rows
s := max(1.4*d_bar, 1.4*a_max, 30 mm) = 41.86 mm
# A23.1-14  6.6.5.2 & 6.6.5.3
# Calculate effective depth
d := h - cover - d_v - ((n_rows - 1)*s/2 + n_rows*d_bar/2) = 400.37 mm  # Assume all rows of tension steel identical
d = 400.37 mm
d' = 52.45 mm
A_s = 2800 mm^2
A'_s = 1400 mm^2
cover = 37.5 mm
# 1.b  Check for minimum tension steel
A_smin := 0.2*sqrt(f'_c/MPa)/(f_y/MPa)*b*h = 312.5 mm^2
# A23.3-14  10.5.1.2
FLAG := if(A_s ≥ A_smin, "Min steel OK", "Steel Inadequate") = "Min steel OK"
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# 2. Calculate As1 and As2 | assume f's=fy and fs=fy
# Conceptually divide the beam into two "beams".  Beam 1 comprises all the compression steel (and equivalent tension steel ) with the remaining left as a singly reinforced RC beam.
# Assume stress in both compression and tension steel yield
A_s1 := A'_s = 1400 mm^2
A_s2 := A_s - A_s1 = 1400 mm^2
# 3. Compute the depth of the equivalent rectangular stress block, a, for Beam 2
α_1 := max(0.85 - 0.0015*f'_c*1/MPa, 0.67) = 0.8125
# A23.3-14  10.1.7
a := ϕ_s*A_s2*f_y/(ϕ_c*α_1*f'_c*b) = 144.208 mm
# 4. Verify compression steel yields | For steel yield d'/a≤1/beta1*(1-f'y/700)
β_1 := max(b_1 ← 0.97 - 0.0025*f'_c*1/MPa, 0.67) = 0.9075
# A23.3-14  10.1.7
d'/a = 0.36371
1/β_1*(1 - f'_y/(700 MPa)) = 0.472255
FLAG := if(d'/a ≤ 1/β_1*(1 - f'_y/(700 MPa)), "Compression steel YIELDS", "Compression steel is ELASTIC") = "Compression steel YIELDS"
# 5. Verify tension steel yields | For steel yield c/d≤ 700/(700+fy)
c := a/β_1 = 158.907 mm
c/d = 0.396901
700 MPa/(700 MPa + f_y) = 0.636364  # A23.3-14  10.5.1.3
FLAG := if(c/d ≤ 700 MPa/(700 MPa + f_y), "Tension steel YIELDS", "Tension steel is ELASTIC") = "Tension steel YIELDS"
# 5. Compute Mr
M_r1 := ϕ_s*A_s1*f_y*(d - d') = 165.61 kN*m
M_r2 := ϕ_s*A_s2*f_y*(d - a/2) = 156.255 kN*m
# Mr for "Beam 1" | Mr for "Beam 2"
M_r := M_r1 + M_r2 = 321.864 kN*m
