# Note:
# 1. Make a variable in PTC MATHCAD is the same in another software
# A. Assign/definition symbol ":="
answer := 42
f := "Fields Medal"
Euler := [e; 1i; π; -1; 0]
x := 5, 10 .. 100
# B. Evaluate symbol "="
answer = 42
f = "Fields Medal"
x = [5; 10; 15; 20; 25; 30; 35; 40; 45; 50; 55; 60; 65; 70; 75; 80; 85; 90; 95; 100]
Euler = [2.71828; 1i; 3.14159; -1; 0]
