# A. Problem
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d^1/dx^1(y(x)) laplace, x → s*integral(y(x)*e^(-(s*x)), x = 0 .. ∞) - y(0)
s*L - 0
# B. Write in Mathcad Form then Laplace it (Step-1)
d^3/dt^3(y(t)) + 3*d^2/dt^2(y(t)) + 3*d^1/dt^1(y(t)) + y(t) - e^t + t + 1 laplace, t → ((-s^3 + s^2)*y''(0) + (s^6 + 2*s^5 - 2*s^3 - s^2)*integral(y(t)*e^(-(s*t)), t = 0 .. ∞) + (3*s^2 - (s^4 + 2*s^3))*y'(0) + (3*y(0)*s^2 - (y(0)*s^5 + 2*y(0)*s^4) - 1))/(s^3 - s^2)
# C. Copy the result and make the form clear (Step-2)
# let assume an initial condition equal to 0 whereas :
#
# y''(0) = 0
# y'(0) = 0
# y(0) = 0
((-s^3 + s^2)*0 + (s^6 + 2*s^5 - 2*s^3 - s^2)*L + (3*s^2 - (s^4 + 2*s^3))*0 + (3*0*s^2 - (0*s^5 + 2*0*s^4) - 1))/(s^3 - s^2) solve, L → 1/(s^6 + 2*s^5 - 2*s^3 - s^2)
# note:
d^1/dt^1(y(t)) laplace, t → s*integral(y(t)*e^(-(s*t)), t = 0 .. ∞) - y(0)
d^2/dt^2(y(t)) laplace, t → s^2*integral(y(t)*e^(-(s*t)), t = 0 .. ∞) - (y'(0) + y(0)*s)
d^2/dt^2(y(t)) laplace, t → s^2*integral(y(t)*e^(-(s*t)), t = 0 .. ∞) - (y'(0) + y(0)*s)
# Look at the Laplace table and how it works!!!
